AnyFolder Joints =
{

};

AnyFolder Drivers =
{
  AnyKinEqSimpleDriver GHDriverRight={
    AnyKinMeasure& ref1 =...BodyModel.Interface.Right.GlenohumeralAbduction;
    DriverPos = {0};
    DriverVel = {140*pi/180};
    Reaction.Type = {Off};
  };
};
