#path __BM_PLUGIN_FILE__ "BodyModelConfiguration.any"
#define BM_CONFIG_PLUGIN __BM_PLUGIN_FILE__

// -----------------------------------------------------------------------------------
// The BodyModel configuration can be modified using BodyModel GUI plugin
// or by manually editing this file.
//
// Please see this this file for more information on the options:
// #path HTML_DOC "<AMMR_PATH_DOC>/bm_config/index.html"
// -----------------------------------------------------------------------------------

// Enable the TLEM2 lower extremity model
#define BM_LEG_MODEL _LEG_MODEL_TLEM2_
#define BM_LEG_LEFT OFF
#define BM_LEG_RIGHT OFF
#define BM_ARM_LEFT OFF

/*------------- SCALING CONFIGURATION SECTION --------------------*/
// Actual scaling law
 #define BM_CUSTOM_SCALING_Right_Scapula
#define BM_CUSTOM_SCALING_Right_Humerus
 //--------------- END OF SCALING CONFIGURATION -------------------

#include "CustomScaling.any"
