//// Hide intact femur, draw resected one

Main.HumanModel.BodyModel.Right.ShoulderArm.Seg.Scapula.DrwSurf.Visible = Off;


Main.HumanModel.BodyModel.Right.ShoulderArm.Seg.Scapula ={

  AnyDrawSurf NewScap = {
    FileName = "../Input/scapula/PJ116_scapula_A_avg_center";
    ScaleXYZ = 0.001*{1.0, 1.0,1.0};
    RGB = ...ColorRef.Segments;
//    Opacity = 0.42;//;
    AnyFunTransform3D &Scale =Main.HumanModel.BodyModel.Right.ShoulderArm.Seg.Scapula.DrwSurf.Scale;//.Scale;
    Face=-1;
  };
};

Main.HumanModel.BodyModel.Right.ShoulderArm.Seg.Humerus.DrwSurf.Visible = Off;


Main.HumanModel.BodyModel.Right.ShoulderArm.Seg.Humerus ={

  AnyDrawSurf NewHum = {
    FileName = "../Input/humerus/PJ116_humerus_A_avg_center";
    ScaleXYZ = 0.001*{1.0, 1.0,1.0};
    RGB = ...ColorRef.Segments;
//    Opacity = 0.42;//;
    AnyFunTransform3D &Scale =Main.HumanModel.BodyModel.Right.ShoulderArm.Seg.Humerus.DrwSurf.Scale;//.Scale;
    Face=-1;
  };
};
