// This is a place holder for the inclusion of custom scaling laws
Main.HumanModel.Scaling.GeometricalScaling = {
#define CUSTOM_SCALING_Right_Scapula
Right.Scapula = {
  #include "Scapula_merged_Scaling.any"
  AnyFunTransform3D &ScaleFunction = Scapula_merged.Transform;
};
};
