Main.HumanModel.BodyModel.Right.ShoulderArm.Seg.Scapula.AnatomicalFrame = {

  /// Node to position the scapula implant
  AnyRefNode ScapulaImplantNode =
  {
//ARel =  {{-0.2291257, 0.329513, 0.9159276}, {-0.677984, -0.7292042, 0.09273527}, {0.6984555, -0.599736, 0.3904836}};

    ///Surface geometry of the scapula implant
    AnySurfSTL ScapulaImplant =
    {
      FileName = "../Input/scapula/PJ116_scapula_A_avg_center.stl";
//      ScaleXYZ = 0.7*1.0*{1.0, 1.0, 1.0};
     ScaleXYZ =0.001*{1.0, 1.0, 1.0};
      AnyDrawSurf DrwSurfScap = {
        FileName = .FileName;
        ScaleXYZ = .ScaleXYZ;
        RGB = {0,0,1};
        Opacity = 0.5;
      };
    };
  };

  };

Main.HumanModel.BodyModel.Right.ShoulderArm.Seg.Humerus.AnatomicalFrame = {

  /// Node to position the humerus implant
  AnyRefNode HumerusImplantNode =
  {
//ARel =  {{-0.2291257, 0.329513, 0.9159276}, {-0.677984, -0.7292042, 0.09273527}, {0.6984555, -0.599736, 0.3904836}};

    ///Surface geometry of the scapula implant
    AnySurfSTL HumerusImplant =
    {
      FileName = "../Input/humerus/PJ116_humerus_A_avg_center.stl";
//      ScaleXYZ = 0.7*1.0*{1.0, 1.0, 1.0};
     ScaleXYZ =0.001*{1.0, 1.0, 1.0};
      AnyDrawSurf DrwSurfScap = {
        FileName = .FileName;
        ScaleXYZ = .ScaleXYZ;
        RGB = {0,0,1};
        Opacity = 0.5;
      };
    };
  };

  };
