 AnyFolder Humerus_merged = {

   AnyFunTransform3DLin Transform = {
    ScaleMat = {{1,0,0},{0,1,0},{0,0,1}};
    Offset = {0,0,0};
    PreTransforms = {&.RBFTransform, &.ReverseTransform};
  };

    AnyFolder Landmarks =
    {
      AnyFolder SourceAffine =
      {
        AnyInputXML XMLObject =
        {
          FileName = "SourceHumerusLeftLocal_picked_points_Affine.pp";
        };
        AnyFloat xptr0 = Obj2Num(ObjSelect("XMLObject.Contents.PickedPoints.point*.active", "==1", ".x_*"));
        AnyFloat yptr0 = Obj2Num(ObjSelect("XMLObject.Contents.PickedPoints.point*.active", "==1", ".y_*"));
        AnyFloat zptr0 = Obj2Num(ObjSelect("XMLObject.Contents.PickedPoints.point*.active", "==1", ".z_*"));
        AnyString PointNames = Obj2Str(ObjSelect("XMLObject.Contents.PickedPoints.point*.active", "==1", ".name")) ;
        AnyFloat Points = {xptr0',yptr0',zptr0'}';
      };

      AnyFolder SourceAffineE =
      {
        AnyInputXML XMLObject =
        {
          FileName = "SourceHumerusLeftLocal_picked_points+.pp";
        };
        AnyFloat xptr0 = Obj2Num(ObjSelect("XMLObject.Contents.PickedPoints.point*.active", "==1", ".x_*"));
        AnyFloat yptr0 = Obj2Num(ObjSelect("XMLObject.Contents.PickedPoints.point*.active", "==1", ".y_*"));
        AnyFloat zptr0 = Obj2Num(ObjSelect("XMLObject.Contents.PickedPoints.point*.active", "==1", ".z_*"));
        AnyString PointNames = Obj2Str(ObjSelect("XMLObject.Contents.PickedPoints.point*.active", "==1", ".name")) ;
        AnyFloat Points = {xptr0',yptr0',zptr0'}';
      };


      AnyFolder TargetAffine =
      {
        AnyInputXML XMLObject =
        {
          FileName = "humerus_Tony_without_pin_postprocess111_picked_points_Affine.pp";
        };
        AnyFloat xptr0 = Obj2Num(ObjSelect("XMLObject.Contents.PickedPoints.point*.active", "==1", ".x_*")) *0.001;
        AnyFloat yptr0 = Obj2Num(ObjSelect("XMLObject.Contents.PickedPoints.point*.active", "==1", ".y_*")) *0.001;
        AnyFloat zptr0 = Obj2Num(ObjSelect("XMLObject.Contents.PickedPoints.point*.active", "==1", ".z_*")) *0.001;
        AnyString PointNames = Obj2Str(ObjSelect("XMLObject.Contents.PickedPoints.point*.active", "==1", ".name")) ;
        AnyFloat Points = {xptr0',yptr0',zptr0'}';
      };

      AnyFolder SourceRBF =
      {
        AnyInputXML XMLObject =
        {
          FileName = "SourceHumerusLeftLocal_picked_points.pp";
        };
        AnyFloat xptr0 = Obj2Num(ObjSelect("XMLObject.Contents.PickedPoints.point*.active", "==1", ".x_*"));
        AnyFloat yptr0 = Obj2Num(ObjSelect("XMLObject.Contents.PickedPoints.point*.active", "==1", ".y_*"));
        AnyFloat zptr0 = Obj2Num(ObjSelect("XMLObject.Contents.PickedPoints.point*.active", "==1", ".z_*"));
        AnyString PointNames = Obj2Str(ObjSelect("XMLObject.Contents.PickedPoints.point*.active", "==1", ".name")) ;
        AnyFloat Points = {xptr0',yptr0',zptr0'}';
      };

      AnyFolder TargetRBF =
      {
        AnyInputXML XMLObject =
        {
          FileName = "humerus_Tony_without_pin_postprocess111_picked_points.pp";
        };
        AnyFloat xptr0 = Obj2Num(ObjSelect("XMLObject.Contents.PickedPoints.point*.active", "==1", ".x_*")) *0.001;
        AnyFloat yptr0 = Obj2Num(ObjSelect("XMLObject.Contents.PickedPoints.point*.active", "==1", ".y_*")) *0.001;
        AnyFloat zptr0 = Obj2Num(ObjSelect("XMLObject.Contents.PickedPoints.point*.active", "==1", ".z_*")) *0.001;
        AnyString PointNames = Obj2Str(ObjSelect("XMLObject.Contents.PickedPoints.point*.active", "==1", ".name")) ;
        AnyFloat Points = {xptr0',yptr0',zptr0'}';
      };
AnyFolder TargetAffineE =
{
AnyFloat Points=
{{0.146398, 0.0043704, -0.190426},
{0.112095, -0.0287061, -0.100098},
{0.101476, -0.0192659, -0.106476},
{0.108534, -0.0126381, -0.120455},
{0.103801, 0.00759646, -0.112821},
{0.128539, -0.0310617, -0.0879435},
{0.13577, -0.0234524, -0.0838733},
{0.140552, 0.00799058, -0.0893566},
{0.0963159, 0.0069718, -0.104098},
{0.103009, -0.0038916, -0.0814231},
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{0.1244719, -0.005927442, -0.22008}};
    };
  };//LandMarks

      AnyFunTransform3DLin2 AffineTransform =
      {
        Points0 = ..Landmarks.SourceAffine.Points;
        Points1 = ..Landmarks.TargetAffine.Points;


        Mode = VTK_LANDMARK_AFFINE;
      };

      AnyFunTransform3DLin2 ReverseTransform = {
    Points0 = .AffineTransform.Points1;
    Points1 = .AffineTransform.Points0;
    Mode = VTK_LANDMARK_RIGIDBODY;
  };

      AnyFunTransform3DRBF RBFTransform =
      {
        PreTransforms = {&.AffineTransform};
        RBFDef =
        {
          Type = RBF_Triharmonic;
          Param = 1;
        };

        Points1 = ..Landmarks.TargetAffineE.Points;
        Points0 = ..Landmarks.SourceRBF.Points;
        PointNames =..Landmarks.SourceRBF.PointNames;

        //       Points1 = ..Landmarks.TargetRBF.//Points;
//       Points0 = ..Landmarks.SourceRBF.Points;
//       PointNames =..Landmarks.SourceRBF.PointNames;


        BoundingBox =
        {
          Type = BB_Cartesian;
          ScaleXYZ = {2, 2, 2};
          DivisionFactorXYZ = 5*{1, 1, 1};
        };
        BoundingBoxOnOff = On;
      };


  }; // MyModel
